OpenVSP model (file version 5), 12 components.
Geometry view with OpenVSP parameter names; values to 6 digits, angles in degrees, lengths in the model's unit.
Overall bounding box: X_Min=-2.04299 X_Len=7.14299 Y_Min=-4.66125 Y_Len=9.32249 Z_Min=-1.91 Z_Len=3.10656

Wing "main_wing"
  location (X Y Z) -0.125 0 0.05, rotation 0 1.9 0
  symmetric about XZ
  bounding box size 1.30887 9.32249 0.159341
  mass: Density=1 Shell_Flag=0 Mass_Area=1 Mass_Prior=0 PointMass=37.4 CGx=0.35 CGy=0 CGz=0 Ixx=0 Iyy=0 Izz=0 Ixy=0 Ixz=0 Iyz=0
  totals: TotalSpan=9.16519 TotalProjectedSpan=9.16519 TotalChord=1.3093 TotalArea=12 TotalAR=7.00006 MAC=1.3093
  root: chord 1.3093, twist 0, NACA 4-series Camber=0.04 CamberLoc=0.4 ThickChord=0.12
  sections:
    n  Span    Root_Chord  Tip_Chord  Area  Sweep  Sweep_Location  Dihedral  Twist  Twist_Location  tip airfoil
    1  4.5826  1.3093      1.3093     6     0      0               0         0      0               as above
  structure "main_wing_Struct0": Skin
  structure "main_wing_Struct1": Skin

Wing "flap", child of "main_wing"
  location (X Y Z) 1.175 0.62 0.008, rotation 0 41.9 0
  symmetric about XZ
  bounding box size 0.297922 7.04 0.267802
  mass: Density=1 Shell_Flag=0 Mass_Area=1 Mass_Prior=0 PointMass=1 CGx=0 CGy=0 CGz=0 Ixx=0 Iyy=0 Izz=0 Ixy=0 Ixz=0 Iyz=0
  totals: TotalSpan=5.8 TotalProjectedSpan=5.8 TotalChord=0.4 TotalArea=2.32 TotalAR=14.5 MAC=0.4
  root: chord 0.4, twist 0, NACA 4-series Camber=0.03 CamberLoc=0.4 ThickChord=0.05
  sections:
    n  Span  Root_Chord  Tip_Chord  Area  Sweep  Sweep_Location  Dihedral  Twist  Twist_Location  tip airfoil
    1  2.9   0.4         0.4        1.16  0      0               0         0      0.25            as above

Fuselage "Fuselage"
  location (X Y Z) -1.9 0 -0.73, rotation 0 0 0
  bounding box size 7.0164 1.03921 1.35
  mass: Density=1 Shell_Flag=0 Mass_Area=1.9 Mass_Prior=0 PointMass=56.3 CGx=1 CGy=0 CGz=0 Ixx=0 Iyy=0 Izz=0 Ixy=0 Ixz=0 Iyz=0
  Design: Length=7
  cross sections:
    n  XLocPercent  YLocPercent  ZLocPercent  shape
    0  0            0            -0.01        point
    1  0.02         0            -0.02        super ellipse Super_Height=0.6 Super_M=5 Super_MaxWidthLoc=0 Super_N=2 Super_Width=0.9
    2  0.14         0            -0.02        super ellipse Super_Height=0.8 Super_M=5 Super_MaxWidthLoc=0 Super_N=2 Super_Width=1
    3  0.25         0            0.0125       super ellipse Super_Height=1.3 Super_M=3 Super_M_bot=5 Super_MaxWidthLoc=-0.114286 Super_N=2 Super_N_bot=2 Super_TopBotSym=0 Super_Width=1
    4  0.35         0            0.015        super ellipse Super_Height=1.35 Super_M=4 Super_M_bot=5 Super_MaxWidthLoc=0 Super_N=2 Super_N_bot=2 Super_TopBotSym=0 Super_Width=0.95
    5  0.42         0            0.018        super ellipse Super_Height=1.3 Super_M=4 Super_M_bot=5 Super_MaxWidthLoc=0 Super_N=2 Super_N_bot=2 Super_TopBotSym=0 Super_Width=0.95
    6  0.99         0            0.09         super ellipse Super_Height=0.2 Super_M=3 Super_MaxWidthLoc=0 Super_N=2 Super_Width=0.05
    7  1            0            0.09         point
  structure "Fuselage_Struct0": Skin, Slice0

Human "OMaverick", child of "Fuselage"
  location (X Y Z) 0 0 -0.752174, rotation 0 30 0
  mass: Density=1088.31 Shell_Flag=0 Mass_Area=1 Mass_Prior=0 PointMass=51 CGx=0 CGy=0 CGz=0 Ixx=0 Iyy=0 Izz=0 Ixy=0 Ixz=0 Iyz=0
  Anthropometric: Age=19 AutoDensity=1 BMI=20.7 BMI_pct=0.05 GenderFlag=0 LenUnit=2 Mass=64.1203 MassUnit=1 SitFrac=0.51 Stature=1.76 Stature_pct=0.519969 Volume=0.0589173

Fuselage "main_strut", child of "Fuselage"
  location (X Y Z) 0.55 -1.2 -1.7, rotation 0 0 90
  bounding box size 0.1 2.4 0.55
  mass: Density=1 Shell_Flag=0 Mass_Area=1 Mass_Prior=0 PointMass=11 CGx=0 CGy=0 CGz=0 Ixx=0 Iyy=0 Izz=0 Ixy=0 Ixz=0 Iyz=0
  Design: Length=2.4
  cross sections:
    n  XLocPercent  YLocPercent  ZLocPercent  shape
    0  0            0            0            point
    1  0.02         0            0            ellipse Ellipse_Height=0.07 Ellipse_Width=0.07
    2  0.36         0            0.2          ellipse Ellipse_Height=0.07 Ellipse_Width=0.1
    3  0.5          0            0.2          as above
    4  0.64         0            0.2          as above
    5  0.98         0            0            ellipse Ellipse_Height=0.07 Ellipse_Width=0.07
    6  1            0            0            point

Fuselage "nose_strut", child of "Fuselage"
  location (X Y Z) -1.28689 0 -1.77705, rotation 0 -62 0
  bounding box size 0.359506 0.06 0.62953
  mass: Density=1 Shell_Flag=0 Mass_Area=1 Mass_Prior=0 PointMass=3 CGx=0 CGy=0 CGz=0 Ixx=0 Iyy=0 Izz=0 Ixy=0 Ixz=0 Iyz=0
  Design: Length=0.7
  cross sections:
    n  XLocPercent  YLocPercent  ZLocPercent  shape
    0  0            0            0            point
    1  0.02         0            0            ellipse Ellipse_Height=0.06 Ellipse_Width=0.06
    2  0.5          0            0            as above
    3  0.895492     0            0            as above
    4  1            0            0            point

Fuselage "main_wheel", child of "nose_strut"
  location (X Y Z) 0.55 -1.3 -1.7, rotation 0 0 90
  symmetric about XZ
  bounding box size 0.4 2.6 0.4
  mass: Density=1 Shell_Flag=0 Mass_Area=1 Mass_Prior=0 PointMass=5 CGx=0 CGy=0 CGz=0 Ixx=0 Iyy=0 Izz=0 Ixy=0 Ixz=0 Iyz=0
  Design: Length=0.2
  cross sections:
    n  XLocPercent  YLocPercent  ZLocPercent  shape
    0  0            0            0            point
    1  0.2          0            0            circle Circle_Diameter=0.4
    2  0.5          0            0            as above
    3  0.8          0            0            as above
    4  1            0            0            point

Fuselage "nose_wheel", child of "main_wheel"
  location (X Y Z) -1.287 -0.18 -1.76, rotation 0 0 90
  bounding box size 0.3 0.36 0.3
  mass: Density=1 Shell_Flag=0 Mass_Area=1 Mass_Prior=0 PointMass=1 CGx=0 CGy=0 CGz=0 Ixx=0 Iyy=0 Izz=0 Ixy=0 Ixz=0 Iyz=0
  Design: Length=0.36
  cross sections:
    n  XLocPercent  YLocPercent  ZLocPercent  shape
    0  0            0            0            point
    1  0.1          0            0            circle Circle_Diameter=0.3
    2  0.25         0            0            as above
    3  0.35         0            0            circle Circle_Diameter=0.1
    4  0.5          0            0            as above
    5  0.65         0            0            as above
    6  0.75         0            0            circle Circle_Diameter=0.3
    7  0.9          0            0            as above
    8  1            0            0            point

Propeller "propeller", child of "Fuselage"
  location (X Y Z) -2 0 -0.79, rotation 90 0 0
  bounding box size 0.0844848 0.165038 1.70306
  mass: Density=1 Shell_Flag=0 Mass_Area=1 Mass_Prior=0 PointMass=8 CGx=0 CGy=0 CGz=0 Ixx=0 Iyy=0 Izz=0 Ixy=0 Ixz=0 Iyz=0
  Design: Diameter=1.7 NumBlade=2 Beta34=20 UseBeta34Flag=1 Feather=0 Rotate=0 Precone=0 ReverseFlag=0 FoldAngle=0 PropMode=0 AF=151.538 CLi=0.538798 Chord=0.177656 Solidity=0.113099 ConstructXoC=0.5 FeatherAxisXoC=0.5 FeatherOffsetXoC=0
  cross sections:
    n  RadiusFrac  shape
    0  0.2         ellipse Ellipse_Height=0.034 Ellipse_Width=0.068
    1  0.4         NACA 16-series Chord=0.141313 IdealCl=0.7 ThickChord=0.144074
    2  1           NACA 16-series Chord=0.1105 IdealCl=0.2 ThickChord=0.03
  Chord along r/R (cubic Bezier): 0.2: 0.08, 0.333333: 0.15, 0.466667: 0.2, 0.6: 0.2, 0.716667: 0.2, 0.833333: 0.2, 0.95: 0.2, 0.966667: 0.2, 0.983333: 0.2, 1: 0.13
  Twist along r/R (PCHIP): 0.2: 46.75, 0.75: 20, 1: 13
  Thick along r/R (cubic Bezier): 0.2: 0.5, 0.233333: 0.3, 0.266667: 0.225, 0.3: 0.2, 0.4: 0.125, 0.5: 0.115, 0.6: 0.1, 0.733333: 0.075, 0.866667: 0.055, 1: 0.03
  CLI along r/R (cubic Bezier): 0.2: 0, 0.266667: 0.7, 0.333333: 0.7, 0.4: 0.7, 0.466667: 0.7, 0.533333: 0.7, 0.6: 0.7, 0.733333: 0.7, 0.866667: 0.7, 1: 0.2

Fuselage "engine", child of "Fuselage"
  location (X Y Z) -1.82 0 -0.875, rotation 0 0 0
  bounding box size 0.837 0.838 0.61
  mass: Density=1 Shell_Flag=0 Mass_Area=1 Mass_Prior=0 PointMass=111 CGx=0 CGy=0 CGz=0 Ixx=0 Iyy=0 Izz=0 Ixy=0 Ixz=0 Iyz=0
  Design: Length=0.837
  cross sections:
    n  XLocPercent  YLocPercent  ZLocPercent  shape
    0  0            0            0            point
    1  0.255123     0            0            rounded rectangle RoundRectXSec_Radius=0.2 RoundedRect_Height=0.61 RoundedRect_Width=0.838
    2  0.75         0            0            as above
    3  1            0            0            point

Wing "horizontal_stabiliser"
  location (X Y Z) 3.95 0.02 -0.18, rotation 0 -5 0
  symmetric about XZ
  bounding box size 0.983318 3.76849 0.135985
  mass: Density=1 Shell_Flag=0 Mass_Area=1 Mass_Prior=0 PointMass=10.7 CGx=0 CGy=0 CGz=0 Ixx=0 Iyy=0 Izz=0 Ixy=0 Ixz=0 Iyz=0
  totals: TotalSpan=3.61 TotalProjectedSpan=3.61 TotalChord=0.987 TotalArea=3.56307 TotalAR=3.65755 MAC=0.987
  root: chord 0.987, twist 0, NACA 4-series Camber=0 CamberLoc=0.2 Invert=1 ThickChord=0.12
  sections:
    n  Span   Root_Chord  Tip_Chord  Area     Sweep  Sweep_Location  Dihedral  Twist  Twist_Location  tip airfoil
    1  1.805  0.987       0.987      1.78153  0      0               0         0      0.25            as above

Wing "v_stab"
  location (X Y Z) 3.8 0 -0.04, rotation 90 0 0
  bounding box size 1.20994 0.12007 1.23656
  mass: Density=1 Shell_Flag=0 Mass_Area=1 Mass_Prior=0 PointMass=10.8 CGx=0 CGy=0 CGz=0 Ixx=0 Iyy=0 Izz=0 Ixy=0 Ixz=0 Iyz=0
  totals: TotalSpan=1.18 TotalProjectedSpan=1.18 TotalChord=0.9 TotalArea=1.062 TotalAR=1.31111 MAC=0.933333
  root: chord 1.2, twist 0, NACA 4-series Camber=0 CamberLoc=0.2 ThickChord=0.1
  sections:
    n  Span  Root_Chord  Tip_Chord  Area   Sweep  Sweep_Location  Dihedral  Twist  Twist_Location  tip airfoil
    1  1.18  1.2         0.6        1.062  20     0.56391         0         0      0.25            NACA 4-series Camber=0 CamberLoc=0.2 DeltaX=-0.263158 ThickChord=0.1

VSPAERO settings (reference component "main_wing"): Sref=12 bref=9.16519 cref=1.3093 Xcg=-0.469307 Ycg=-0.156105 Zcg=-1.01429 AlphaStart=-3 AlphaEnd=12 AlphaNpts=6 BetaStart=0 BetaEnd=3 BetaNpts=1 MachStart=0.046 MachEnd=0 MachNpts=1 ReCref=1.07661e+06 Vinf=50 Rho=0.002377
  control group "Unnamed Control Group": DeflectionAngle=0
